*Heading
** Job name: Job-22 Model name: Model-1
** Generated by: Abaqus/CAE 2023
*Preprint, echo=NO, model=NO, history=NO, contact=NO
**
** PARTS
**
*Part, name=Part-1
*Node
      1, -0.00999999978, -0.0199999996, 0.00499999989
      2, -0.00999999978, -0.0149999997, 0.00499999989
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*Element, type=C3D8R
  1,  27,  28,  41,  40,   1,   2,  15,  14
  2,  28,  29,  42,  41,   2,   3,  16,  15
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*Nset, nset=Set-1, generate
   1,  338,    1
*Elset, elset=Set-1, generate
   1,  144,    1
** Section: Section-1
*Solid Section, elset=Set-1, material=Material-1
,
*End Part
**
*Part, name=Part-2
*End Part
**
*Part, name=Part-3
*Node
      1, 0.00670747133, -0.00160216156,           0.
      2, 0.00710291695, 0.00288510579,           0.
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*Element, type=C3D8R
 1,  24,  23,  29,  27,   8,   7,  13,  11
 2,  31,  20,  19,  18,  15,   4,   3,   2
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*Nset, nset=Set-1, generate
   1,  128,    1
*Elset, elset=Set-1, generate
  1,  70,   1
*Orientation, name=Ori-1
1., 0., 0., 0., 1., 0.
2, 0.
** Section: Section-2
*Solid Section, elset=Set-1, orientation=Ori-1, material=Material-2
,
*End Part
**
**
** ASSEMBLY
**
*Assembly, name=Assembly
**
*Instance, name=Part-1-1, part=Part-1
*End Instance
**
*Instance, name=Part-2-1, part=Part-2
       -0.01,         0.01,           0.
*End Instance
**
*Instance, name=Part-3-1, part=Part-3
*End Instance
**
*Nset, nset=Set-2, instance=Part-1-1, generate
   1,  326,   13
*Elset, elset=Set-2, instance=Part-1-1, generate
   1,  133,   12
*Nset, nset=Set-4, instance=Part-3-1, generate
 113,  128,    1
*Elset, elset=Set-4, instance=Part-3-1, generate
 61,  70,   1
*Nset, nset=Set-5, instance=Part-3-1, generate
 113,  122,    1
*Elset, elset=Set-5, instance=Part-3-1
 61, 62, 64, 65, 66, 67, 68, 70
*Nset, nset=Set-6, instance=Part-1-1
  14,  15,  16,  17,  18,  19
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*Elset, elset=Set-6, instance=Part-1-1, generate
   1,  144,    1
*Nset, nset=Set-7, instance=Part-3-1, generate
  1,  16,   1
*Elset, elset=Set-7, instance=Part-3-1, generate
  1,  10,   1
*Nset, nset=Set-8, instance=Part-3-1, generate
 113,  128,    1
*Elset, elset=Set-8, instance=Part-3-1, generate
 61,  70,   1
*Nset, nset=Set-9, instance=Part-1-1, generate
 313,  338,    1
*Elset, elset=Set-9, instance=Part-1-1, generate
 133,  144,    1
*Nset, nset=Set-10, instance=Part-1-1, generate
 313,  338,    1
*Elset, elset=Set-10, instance=Part-1-1, generate
 133,  144,    1
*Nset, nset=Set-11, instance=Part-1-1, generate
   1,  326,   13
*Elset, elset=Set-11, instance=Part-1-1, generate
   1,  133,   12
*Nset, nset=Set-node, instance=Part-1-1, generate
  13,  130,   13
*Nset, nset=_PickedSet6, internal, instance=Part-1-1, generate
   1,  338,    1
*Elset, elset=_PickedSet6, internal, instance=Part-1-1, generate
   1,  144,    1
*Elset, elset=_Surf-1_S1, internal, instance=Part-3-1, generate
 61,  70,   1
*Surface, type=ELEMENT, name=Surf-1
_Surf-1_S1, S1
*Elset, elset=_Surf-2_S5, internal, instance=Part-1-1, generate
   1,  144,    1
*Surface, type=ELEMENT, name=Surf-2
_Surf-2_S5, S5
*Enrichment, name=Crack-1, type=PROPAGATION CRACK, elset=_PickedSet6
*End Assembly
**
** MATERIALS
**
*Material, name=Material-1
*Damage Initiation, criterion=MAXPE
 1e+07,
*Damage Evolution, type=DISPLACEMENT
 0.0001,
*Density
7800.,
*Elastic
 2.15e+11, 0.3
*Material, name=Material-2
*Density
7500.,
*Dielectric, type=ANISO
 5.87e-09,       0., 6.75e-09,       0.,       0., 6.75e-09
*Elastic, type=ORTHOTROPIC
 1.5e+11, 7.43e+10, 1.39e+11, 7.43e+10, 7.78e+10, 1.39e+11, 2.56e+10, 2.56e+10
 2.56e+10,
*Piezoelectric
 15.08, -5.207, -5.207,     0.,     0.,     0.,     0.,     0.
     0.,  12.71,     0.,     0.,     0.,     0.,     0.,     0.
  12.71,     0.
*Initial Conditions, type=ENRICHMENT
Part-1-1.43, 1,Crack-1, 1e-06, 0.
Part-1-1.43, 2,Crack-1, -0.005, 0.
Part-1-1.43, 3,Crack-1, -0.005, 0.
Part-1-1.43, 4,Crack-1, 1e-06, 0.
Part-1-1.43, 5,Crack-1, 1e-06, -0.005
Part-1-1.43, 6,Crack-1, -0.005, -0.005
Part-1-1.43, 7,Crack-1, -0.005, -0.005
Part-1-1.43, 8,Crack-1, 1e-06, -0.005
Part-1-1.31, 1,Crack-1, 1e-06
Part-1-1.31, 2,Crack-1, -0.005
Part-1-1.31, 3,Crack-1, -0.005
Part-1-1.31, 4,Crack-1, 1e-06
Part-1-1.31, 5,Crack-1, 1e-06
Part-1-1.31, 6,Crack-1, -0.005
Part-1-1.31, 7,Crack-1, -0.005
Part-1-1.31, 8,Crack-1, 1e-06
Part-1-1.19, 1,Crack-1, 1e-06
Part-1-1.19, 2,Crack-1, -0.005
Part-1-1.19, 3,Crack-1, -0.005
Part-1-1.19, 4,Crack-1, 1e-06
Part-1-1.19, 5,Crack-1, 1e-06
Part-1-1.19, 6,Crack-1, -0.005
Part-1-1.19, 7,Crack-1, -0.005
Part-1-1.19, 8,Crack-1, 1e-06
Part-1-1.7, 1,Crack-1, 1e-06
Part-1-1.7, 2,Crack-1, -0.005
Part-1-1.7, 3,Crack-1, -0.005
Part-1-1.7, 4,Crack-1, 1e-06
Part-1-1.7, 5,Crack-1, 1e-06
Part-1-1.7, 6,Crack-1, -0.005
Part-1-1.7, 7,Crack-1, -0.005
Part-1-1.7, 8,Crack-1, 1e-06
**
** BOUNDARY CONDITIONS
**
** Name: BC-1 Type: Symmetry/Antisymmetry/Encastre
*Boundary
Set-2, ENCASTRE
** ----------------------------------------------------------------
**
** STEP: Step-1
**
*Step, name=Step-1, nlgeom=YES
*Static, stabilize=0.0002, allsdtol=0.05, continue=NO
1e-05, 1., 1e-12, 1.
**
** BOUNDARY CONDITIONS
**
** Name: BC-2 Type: Displacement/Rotation
*Boundary
Set-node, 1, 1
Set-node, 2, 2, 0.0005
Set-node, 3, 3
Set-node, 4, 4
Set-node, 5, 5
Set-node, 6, 6
** Name: BC-3 Type: Electric potential
*Boundary
Set-4, 9, 9, 500.
** Name: BC-4 Type: Symmetry/Antisymmetry/Encastre
*Boundary
Set-5, ENCASTRE
** Name: BC-5 Type: Symmetry/Antisymmetry/Encastre
*Boundary
Set-7, PINNED
** Name: BC-6 Type: Symmetry/Antisymmetry/Encastre
*Boundary
Set-8, PINNED
** Name: BC-7 Type: Symmetry/Antisymmetry/Encastre
*Boundary
Set-9, ENCASTRE
** Name: BC-8 Type: Symmetry/Antisymmetry/Encastre
*Boundary
Set-10, PINNED
** Name: BC-9 Type: Symmetry/Antisymmetry/Encastre
*Boundary
Set-11, PINNED
**
** LOADS
**
** Name: Load-1   Type: Pressure
*Dsload
Surf-1, P, 200000.
** Name: Load-2   Type: Pressure
*Dsload
Surf-2, P, 200000.
**
** INTERACTIONS
**
** Interaction: Int-1
*Enrichment Activation, name=Crack-1, activate=ON
**
** OUTPUT REQUESTS
**
*Restart, write, frequency=0
**
** FIELD OUTPUT: F-Output-1
**
*Output, field
*Node Output
CF, PHILSM, PSILSM, RF, U
*Element Output, directions=YES
DMICRT, EACTIVE, LE, PE, PEEQ, PEMAG, S, STATUS
*Contact Output
CDISP, CSTRESS
**
** HISTORY OUTPUT: H-Output-1
**
*Output, history, variable=PRESELECT
*End Step
